// COMSOL Multiphysics 6.2.0.290 model "double_dot.mph"
// Outline of the model tree

Parameters
  substrate_size = 10000.0[nm]

Geometry
  geom1 "Geometry 1" (3D, length unit µm)
    blk1: Block "substrate"
      pos = {0, 0, -822.5[nm]}
      base = center
      size = {substrate_size, substrate_size, 1645.0[nm]}
      layername = {Layer 1, Layer 2, Layer 3, Layer 4}
      layer = {1500.0[nm], 10.5[nm], 4.0[nm], 10.5[nm]}
    wp1: WorkPlane "mesa_etch_wp" | unite = on
      imp1: Import "mesa_etch"
        type = ecad
        filename = double_dot.gds
        ecadtype = gds
        fileunit = µm
        layername = {LAYER0, LAYER1, LAYER2, LAYER3, LAYER4, LAYER5}
        layerprop = {{LAYER0, Metal}, {LAYER1, Metal}, {LAYER2, Metal}, {LAYER3, Metal}, {LAYER4, Metal}, {LAYER5, Metal}}
        importlayer = {on, off, off, off, off, off}
    ext1: Extrude "mesa_etch_Etch"
      workplane = wp1
      input = wp1
      inputhandling = remove
      distance = 134.5[nm]
      reverse = on
      scale = {1, 0.308483290488}
    mov1: Move | input = ext1; displx = 0; disply = -0.0[nm]; displz = 0
    arr1: Array | input = mov1; displ = {0, 2000[nm], 0}
    dif1: Difference | input = blk1; input2 = arr1
    wp2: WorkPlane "dot_wp" | quickz = -134.5[nm]; unite = on
      imp2: Import
        type = ecad
        filename = double_dot.gds
        ecadtype = gds
        fileunit = µm
        layername = {LAYER0, LAYER1, LAYER2, LAYER3, LAYER4, LAYER5}
        layerprop = {{LAYER0, Metal}, {LAYER1, Metal}, {LAYER2, Metal}, {LAYER3, Metal}, {LAYER4, Metal}, {LAYER5, Metal}}
        importlayer = {off, off, off, off, off, on}
    ext2: Extrude "dot_ext" | workplane = wp2; input = wp2; inputhandling = remove; distance = 4[nm]
    mov2: Move | input = ext2; displx = 0; disply = -0.0[nm]; displz = 0
    arr2: Array | input = mov2; displ = {0, 2000[nm], 0}
    wp3: WorkPlane "metal_wp" | quickz = 800[nm]; unite = on
      imp3: Import
        type = ecad
        filename = double_dot.gds
        ecadtype = gds
        fileunit = µm
        layername = {LAYER0, LAYER1, LAYER2, LAYER3, LAYER4, LAYER5}
        layerprop = {{LAYER0, Metal}, {LAYER1, Metal}, {LAYER2, Metal}, {LAYER3, Metal}, {LAYER4, Metal}, {LAYER5, Metal}}
        importlayer = {off, off, on, off, off, off}
    ext3: Extrude | workplane = wp3; input = wp3; inputhandling = remove; distance = 1000[nm]; reverse = on
    mov3: Move | input = ext3; displx = 0; disply = -0.0[nm]; displz = 0
    dif3: Difference | input = mov3; input2 = dif1; keepsubtract = on
    mov300: Move | input = dif3; displx = 0; disply = 0; displz = -100[nm]
    int3: Intersection | input = dif1, mov300; keep = on; intbnd = off; face = all
    mov310: Move | input = int3; displx = 0; disply = 0; displz = 100[nm]
    int300: Intersection | input = mov310, mov300; intbnd = off; face = all
    arr3: Array | input = int300; displ = {0, 2000[nm], 0}
    wp4: WorkPlane "Al2O3_wp" | quickz = 800[nm]; unite = on
      imp4: Import
        type = ecad
        filename = double_dot.gds
        ecadtype = gds
        fileunit = µm
        layername = {LAYER0, LAYER1, LAYER2, LAYER3, LAYER4, LAYER5}
        layerprop = {{LAYER0, Metal}, {LAYER1, Metal}, {LAYER2, Metal}, {LAYER3, Metal}, {LAYER4, Metal}, {LAYER5, Metal}}
        importlayer = {off, off, off, off, on, off}
    ext4: Extrude | workplane = wp4; input = wp4; inputhandling = remove; distance = 1000[nm]; reverse = on
    dif4: Difference | input = ext4; input2 = dif1, arr3(1,1,1); keepsubtract = on
    mov4: Move | input = dif4; displx = 0; disply = 0; displz = -35[nm]
    int4: Intersection | input = dif1, mov4; keep = on; intbnd = off; face = all
    mov400: Move | input = int4; displx = 0; disply = 0; displz = 35[nm]
    int400: Intersection | input = mov4, mov400
    wp5: WorkPlane "metal_Al2O3_wp" | quickz = 800[nm]; unite = on
      imp5: Import
        type = ecad
        filename = double_dot.gds
        ecadtype = gds
        fileunit = µm
        layername = {LAYER0, LAYER1, LAYER2, LAYER3, LAYER4, LAYER5}
        layerprop = {{LAYER0, Metal}, {LAYER1, Metal}, {LAYER2, Metal}, {LAYER3, Metal}, {LAYER4, Metal}, {LAYER5, Metal}}
        importlayer = {off, off, on, off, off, off}
    ext5: Extrude | workplane = wp5; input = wp5; inputhandling = remove; distance = 1000[nm]; reverse = on
    mov5: Move | input = ext5; displx = 0; disply = -0.0[nm]; displz = 0
    dif5: Difference | input = mov5; input2 = arr3(1,1,1); keepsubtract = on
    mov500: Move | input = dif5; displx = 0; disply = 0; displz = -35[nm]
    int5: Intersection | input = arr3(1,1,1), mov500; keep = on; intbnd = off; face = all
    mov510: Move | input = int5; displx = 0; disply = 0; displz = 35[nm]
    int500: Intersection | input = mov510, mov500; intbnd = off; face = all
    arr5: Array | input = int500; displ = {0, 2000[nm], 0}
    wp6: WorkPlane "QPC_wp" | quickz = 35[nm]; unite = on
      imp6: Import
        type = ecad
        filename = double_dot.gds
        ecadtype = gds
        fileunit = µm
        layername = {LAYER0, LAYER1, LAYER2, LAYER3, LAYER4, LAYER5}
        layerprop = {{LAYER0, Metal}, {LAYER1, Metal}, {LAYER2, Metal}, {LAYER3, Metal}, {LAYER4, Metal}, {LAYER5, Metal}}
        importlayer = {off, on, off, off, off, off}
    wp7: WorkPlane "Plunger_wp" | quickz = -99.5[nm]; unite = on
      imp7: Import
        type = ecad
        filename = double_dot.gds
        ecadtype = gds
        fileunit = µm
        layername = {LAYER0, LAYER1, LAYER2, LAYER3, LAYER4, LAYER5}
        layerprop = {{LAYER0, Metal}, {LAYER1, Metal}, {LAYER2, Metal}, {LAYER3, Metal}, {LAYER4, Metal}, {LAYER5, Metal}}
        importlayer = {off, off, off, on, off, off}
    sel8: ExplicitSelection "Al2O3sel" | selection = int400, arr5(1,1,1); selshow = all
    sel9: ExplicitSelection "DomainTerminalsel9" | selection = arr2(1,1,1), arr3(1,1,1); selshow = all
    sel10: ExplicitSelection "Groundsel10" | selection = wp6, wp7; selshow = all
    fin: Finalize "Form Union"

Materials
  InAs: Common on domains 3, 7, 10-12
    def "Basic"
      relpermittivity = 15.1
  InGaAs: Common on domains 2, 4, 8
    def "Basic"
      relpermittivity = 14.1
  InAlAs: Common on domains 1, 5, 6, 9
    def "Basic"
      relpermittivity = 13.3
  Al2O3: Common on selection geom1_sel8_dom
    def "Basic"
      relpermittivity = 4.5

Physics
  es: Electrostatics on all domains
    dependent variable V
    ccn1: ChargeConservation (default)
    zc1: ZeroCharge (default)
    init1: init "Initial Values 1" (default)
    DomainTerminal9: DomainTerminal "Terminal 9" on selection geom1_sel9_dom
    gnd10: Ground on selection geom1_sel10_bnd

Mesh
  mesh1 "Mesh 1" (physics-controlled)

Studies
  std1 "Study 1"
    stssw: StationarySourceSweep | plist = 1