// COMSOL Multiphysics 6.2.0.415 model "test.mph"
// Outline of the model tree

Parameters
  substrate_size = 40000.0[nm]

Geometry
  geom1 "Geometry 1" (3D, length unit µm)
    blk1: Block "substrate"
      pos = {0, 0, -822.5[nm]}
      base = center
      size = {substrate_size, substrate_size, 1645.0[nm]}
      layername = {Layer 1, Layer 2, Layer 3, Layer 4}
      layer = {1500.0[nm], 10.5[nm], 4.0[nm], 10.5[nm]}
    wp1: WorkPlane "mesa_etch_wp" | unite = on
      imp1: Import "mesa_etch"
        type = ecad
        filename = C:/Users/DGG/Documents/comsol/GDS/dot_3layers.GDS
        ecadtype = gds
        fileunit = µm
        layername = {LAYER5, LAYER7, LAYER61, LAYER101, LAYER111, LAYER122}
        layerprop = 
          {LAYER5, Metal}
          {LAYER7, Metal}
          {LAYER61, Metal}
          {LAYER101, Metal}
          {LAYER111, Metal}
          {LAYER122, Metal}
        importlayer = {on, off, off, off, off, off}
    ext1: Extrude "mesa_etch_Etch"
      workplane = wp1
      input = wp1
      inputhandling = remove
      distance = 134.5[nm]
      reverse = on
    dif1: Difference "mesa_etch" | input = blk1; input2 = ext1
    wp2: WorkPlane "metal_island_etch_wp" | unite = on
      imp2: Import "metal_island_etch"
        type = ecad
        filename = C:/Users/DGG/Documents/comsol/GDS/dot_3layers.GDS
        ecadtype = gds
        fileunit = µm
        layername = {LAYER5, LAYER7, LAYER61, LAYER101, LAYER111, LAYER122}
        layerprop = 
          {LAYER5, Metal}
          {LAYER7, Metal}
          {LAYER61, Metal}
          {LAYER101, Metal}
          {LAYER111, Metal}
          {LAYER122, Metal}
        importlayer = {off, off, on, off, off, off}
    ext2: Extrude "metal_island_etch_Etch"
      workplane = wp2
      input = wp2
      inputhandling = remove
      distance = 134.5[nm]
      reverse = on
    dif2: Difference "metal_island_etch" | input = dif1; input2 = ext2
    wp3: WorkPlane "metal_island_wp" | quickz = -134.5[nm]; unite = on
      imp3: Import
        type = ecad
        filename = C:/Users/DGG/Documents/comsol/GDS/dot_3layers.GDS
        ecadtype = gds
        fileunit = µm
        layername = {LAYER5, LAYER7, LAYER61, LAYER101, LAYER111, LAYER122}
        layerprop = 
          {LAYER5, Metal}
          {LAYER7, Metal}
          {LAYER61, Metal}
          {LAYER101, Metal}
          {LAYER111, Metal}
          {LAYER122, Metal}
        importlayer = {off, off, on, off, off, off}
    ext3: Extrude "metal_island_ext" | workplane = wp3; input = wp3; inputhandling = remove; distance = 50[nm]
    wp4: WorkPlane "al2o3_trench_wp" | quickz = -134.5[nm]; unite = on
      imp4: Import
        type = ecad
        filename = C:/Users/DGG/Documents/comsol/GDS/dot_3layers.GDS
        ecadtype = gds
        fileunit = µm
        layername = {LAYER5, LAYER7, LAYER61, LAYER101, LAYER111, LAYER122}
        layerprop = 
          {LAYER5, Metal}
          {LAYER7, Metal}
          {LAYER61, Metal}
          {LAYER101, Metal}
          {LAYER111, Metal}
          {LAYER122, Metal}
        importlayer = {on, off, off, off, off, off}
    ext4: Extrude "al2o3_trench_ext" | workplane = wp4; input = wp4; inputhandling = remove; distance = 35[nm]
    wp5: WorkPlane "al2o3_island_wp" | quickz = -84.5[nm]; unite = on
      imp5: Import
        type = ecad
        filename = C:/Users/DGG/Documents/comsol/GDS/dot_3layers.GDS
        ecadtype = gds
        fileunit = µm
        layername = {LAYER5, LAYER7, LAYER61, LAYER101, LAYER111, LAYER122}
        layerprop = 
          {LAYER5, Metal}
          {LAYER7, Metal}
          {LAYER61, Metal}
          {LAYER101, Metal}
          {LAYER111, Metal}
          {LAYER122, Metal}
        importlayer = {off, off, on, off, off, off}
    ext5: Extrude "al2o3_island_ext" | workplane = wp5; input = wp5; inputhandling = remove; distance = 35[nm]
    wp6: WorkPlane "al2o3_mesa_wp" | quickz = 0[nm]; unite = on
      imp6: Import
        type = ecad
        filename = C:/Users/DGG/Documents/comsol/GDS/dot_3layers.GDS
        ecadtype = gds
        fileunit = µm
        layername = {LAYER5, LAYER7, LAYER61, LAYER101, LAYER111, LAYER122}
        layerprop = 
          {LAYER5, Metal}
          {LAYER7, Metal}
          {LAYER61, Metal}
          {LAYER101, Metal}
          {LAYER111, Metal}
          {LAYER122, Metal}
        importlayer = {off, off, off, off, off, on}
    ext6: Extrude "al2o3_mesa_ext" | workplane = wp6; input = wp6; inputhandling = remove; distance = 35[nm]
    wp7: WorkPlane "semi_dot_wp" | quickz = -134.5[nm]; unite = on
      imp7: Import
        type = ecad
        filename = C:/Users/DGG/Documents/comsol/GDS/dot_3layers.GDS
        ecadtype = gds
        fileunit = µm
        layername = {LAYER5, LAYER7, LAYER61, LAYER101, LAYER111, LAYER122}
        layerprop = 
          {LAYER5, Metal}
          {LAYER7, Metal}
          {LAYER61, Metal}
          {LAYER101, Metal}
          {LAYER111, Metal}
          {LAYER122, Metal}
        importlayer = {off, off, off, off, on, off}
    ext7: Extrude "semi_dot_ext" | workplane = wp7; input = wp7; inputhandling = remove; distance = 4[nm]
    wp8: WorkPlane "QPC_wp" | quickz = 35[nm]; unite = on
      imp8: Import
        type = ecad
        filename = C:/Users/DGG/Documents/comsol/GDS/dot_3layers.GDS
        ecadtype = gds
        fileunit = µm
        layername = {LAYER5, LAYER7, LAYER61, LAYER101, LAYER111, LAYER122}
        layerprop = 
          {LAYER5, Metal}
          {LAYER7, Metal}
          {LAYER61, Metal}
          {LAYER101, Metal}
          {LAYER111, Metal}
          {LAYER122, Metal}
        importlayer = {off, on, off, off, off, off}
    wp9: WorkPlane "Plunger_wp" | quickz = -99.5[nm]; unite = on
      imp9: Import
        type = ecad
        filename = C:/Users/DGG/Documents/comsol/GDS/dot_3layers.GDS
        ecadtype = gds
        fileunit = µm
        layername = {LAYER5, LAYER7, LAYER61, LAYER101, LAYER111, LAYER122}
        layerprop = 
          {LAYER5, Metal}
          {LAYER7, Metal}
          {LAYER61, Metal}
          {LAYER101, Metal}
          {LAYER111, Metal}
          {LAYER122, Metal}
        importlayer = {off, off, off, on, off, off}
    sel10: ExplicitSelection "Al2O3sel" | selection = ext4, ext5, ext6; selshow = all
    sel11: ExplicitSelection "Groundsel" | selection = wp8, wp9; selshow = all
    sel12: ExplicitSelection "DomainTerminalsel" | selection = ext7; selshow = all
    fin: Finalize "Form Union"

Materials
  InAs: Common on domains 6, 9, 12, 14
    def "Basic"
      relpermittivity = 15.1
  InGaAs: Common on domains 5, 7, 10
    def "Basic"
      relpermittivity = 14.1
  InAlAs: Common on domains 4, 8, 11
    def "Basic"
      relpermittivity = 13.3
  Al2O3: Common on selection geom1_sel10_dom
    def "Basic"
      relpermittivity = 4.5

Physics
  es: Electrostatics on all domains
    dependent variable V
    ccn1: ChargeConservation (default)
    zc1: ZeroCharge (default)
    init1: init "Initial Values 1" (default)
    gnd11: Ground on no boundaries
    DomainTerminal12: DomainTerminal "Terminal 12" on no domains

Mesh
  mesh1 "Mesh 1" (physics-controlled)

Studies
  std1 "Study 1"
    stssw: StationarySourceSweep | plist = 1